// SBML level 1 version 1

model MAPK_in_Solution()
  // MAPK cascade in solution (no scaffold)
  // Citation
  // Levchenko, A., Bruck, J., Sternberg, P.W. (2000) .Scaffold proteins may biphasically affect the levels of mitogen- activated protein kinase signaling and reduce its threshold properties. Proc. Natl. Acad. Sci. USA 97( 11):5818-5823. http://www.pnas.org/cgi/content/abstract/97/11/5818
  // Description
  // This model describes a basic 3- stage Mitogen Activated Protein Kinase (MAPK) cascade in solution. This cascade is typically expressed as RAF= =>MEK==>MAPK (alternative forms are K3==>K2==> K1 and KKK==>KK==>K) . The input signal is RAFK (RAF Kinase) and the output signal is MAPKpp ( doubly phosphorylated form of MAPK) . RAFK phosphorylates RAF once to RAFp. RAFp, the phosphorylated form of RAF induces two phoshporylations of MEK, to MEKp and MEKpp. MEKpp, the doubly phosphorylated form of MEK, induces two phosphorylations of MAPK to MAPKp and MAPKpp.
  // Rate constant Reaction
  // a1 = 1. RAF + RAFK -> RAFRAFK
  // a2 = 0.5 RAFp + RAFPH -> RAFpRAFPH
  // a3 = 3.3 MEKp + RAFp -> MEKpRAFp
  // a3 = 3.3 MEK + RAFp -> MEKRAFp
  // a4 = 10. MEKPH + MEKpp -> MEKppMEKPH
  // a4 = 10. MEKp + MEKPH -> MEKpMEKPH
  // a7 = 20. MAPK + MEKpp -> MAPKMEKpp
  // a7 = 20. MAPKp + MEKpp -> MAPKpMEKpp
  // a8 = 5. MAPKPH + MAPKpp -> MAPKppMAPKPH
  // a8 = 5. MAPKp + MAPKPH -> MAPKpMAPKPH
  // d1 = 0.4 RAFRAFK -> RAF + RAFK
  // d2 = 0.5 RAFpRAFPH -> RAFp + RAFPH
  // d3 = 0.42 MEKpRAFp -> MEKp + RAFp
  // d3 = 0.42 MEKRAFp -> MEK + RAFp
  // d4 = 0.8 MEKpMEKPH -> MEKp + MEKPH
  // d4 = 0.8 MEKppMEKPH -> MEKPH + MEKpp
  // d7 = 0.6 MAPKMEKpp -> MAPK + MEKpp
  // d7 = 0.6 MAPKpMEKpp -> MAPKp + MEKpp
  // d8 = 0.4 MAPKpMAPKPH -> MAPKp + MAPKPH
  // d8 = 0.4 MAPKppMAPKPH -> MAPKPH + MAPKpp
  // k1 = 0.1 RAFRAFK -> RAFK + RAFp
  // k2 = 0.1 RAFpRAFPH -> RAF + RAFPH
  // k3 = 0.1 MEKpRAFp -> MEKpp + RAFp
  // k3 = 0.1 MEKRAFp -> MEKp + RAFp
  // k4 = 0.1 MEKpMEKPH -> MEK + MEKPH
  // k4 = 0.1 MEKppMEKPH -> MEKp + MEKPH
  // k7 = 0.1 MAPKMEKpp -> MAPKp + MEKpp
  // k7 = 0.1 MAPKpMEKpp -> MAPKpp + MEKpp
  // k8 = 0.1 MAPKpMAPKPH -> MAPK + MAPKPH
  // k8 = 0.1 MAPKppMAPKPH -> MAPKp + MAPKPH
  // Variable IC ODE
  // MAPK 0.3 MAPK'[t] == d7*MAPKMEKpp[t] + k8*MAPKpMAPKPH[t] - a7*MAPK[t]*MEKpp[t]
  // MAPKMEKpp 0 MAPKMEKpp'[t] == -(d7*MAPKMEKpp[t]) - k7*MAPKMEKpp[t] + a7*MAPK[t]*MEKpp[t]
  // MAPKp 0 MAPKp'[t] == k7*MAPKMEKpp[t] - a8*MAPKp[t]*MAPKPH[t] + d8*MAPKpMAPKPH[t] + d7*MAPKpMEKpp[t] + k8* MAPKppMAPKPH[t] - a7*MAPKp[t]*MEKpp[t]
  // MAPKPH 0.3 MAPKPH'[t] == -(a8*MAPKp[t]*MAPKPH[t]) + d8*MAPKpMAPKPH[ t] + k8*MAPKpMAPKPH[t] - a8*MAPKPH[t]*MAPKpp[t] + d8*MAPKppMAPKPH[t] + k8*MAPKppMAPKPH[t]
  // MAPKpMAPKPH 0 MAPKpMAPKPH'[t] == a8*MAPKp[t]*MAPKPH[t] - d8* MAPKpMAPKPH[t] - k8*MAPKpMAPKPH[t]
  // MAPKpMEKpp 0 MAPKpMEKpp'[t] == -(d7*MAPKpMEKpp[t]) - k7*MAPKpMEKpp[t] + a7*MAPKp[t]*MEKpp[t]
  // MAPKpp 0 MAPKpp'[t] == k7*MAPKpMEKpp[t] - a8*MAPKPH[t]*MAPKpp[t] + d8*MAPKppMAPKPH[t]
  // MAPKppMAPKPH 0 MAPKppMAPKPH'[t] == a8*MAPKPH[t]*MAPKpp[t] - d8* MAPKppMAPKPH[t] - k8*MAPKppMAPKPH[t]
  // MEK 0.2 MEK'[t] == k4*MEKpMEKPH[t] + d3*MEKRAFp[t] - a3*MEK[t]*RAFp[t]
  // MEKp 0 MEKp'[t] == -(a4*MEKp[t]*MEKPH[t]) + d4*MEKpMEKPH[t] + k4*MEKppMEKPH[t] + d3*MEKpRAFp[t] + k3*MEKRAFp[ t] - a3*MEKp[t]*RAFp[t]
  // MEKPH 0.2 MEKPH'[t] == -(a4*MEKp[t]*MEKPH[t]) + d4*MEKpMEKPH[t] + k4*MEKpMEKPH[t] - a4*MEKPH[t]*MEKpp[t] + d4* MEKppMEKPH[t] + k4*MEKppMEKPH[t]
  // MEKpMEKPH 0 MEKpMEKPH'[t] == a4*MEKp[t]*MEKPH[t] - d4*MEKpMEKPH[t] - k4*MEKpMEKPH[t]
  // MEKpp 0 MEKpp'[t] == d7*MAPKMEKpp[t] + k7*MAPKMEKpp[t] + d7*MAPKpMEKpp[t] + k7*MAPKpMEKpp[t] - a7*MAPK[t]* MEKpp[t] - a7*MAPKp[t]*MEKpp[t] - a4*MEKPH[t]*MEKpp[t] + d4*MEKppMEKPH[t] + k3*MEKpRAFp[t]
  // MEKppMEKPH 0 MEKppMEKPH'[t] == a4*MEKPH[t]*MEKpp[t] - d4*MEKppMEKPH[ t] - k4*MEKppMEKPH[t]
  // MEKpRAFp 0 MEKpRAFp'[t] == -(d3*MEKpRAFp[t]) - k3*MEKpRAFp[t] + a3*MEKp[t]*RAFp[t]
  // MEKRAFp 0 MEKRAFp'[t] == -(d3*MEKRAFp[t]) - k3*MEKRAFp[t] + a3*MEK[t]*RAFp[t]
  // RAF 0.4 RAF'[t] == -(a1*RAF[t]*RAFK[t]) + k2*RAFpRAFPH[t] + d1*RAFRAFK[t]
  // RAFK 0.1 RAFK'[t] == -(a1*RAF[t]*RAFK[t]) + d1*RAFRAFK[t] + k1*RAFRAFK[t]
  // RAFp 0 RAFp'[t] == d3*MEKpRAFp[t] + k3*MEKpRAFp[t] + d3*MEKRAFp[t] + k3*MEKRAFp[t] - a3*MEK[t]*RAFp[t] - a3*MEKp[t]*RAFp[t] - a2*RAFp[t]*RAFPH[t] + d2* RAFpRAFPH[t] + k1*RAFRAFK[t]
  // RAFPH 0.3 RAFPH'[t] == -(a2*RAFp[t]*RAFPH[t]) + d2*RAFpRAFPH[t] + k2*RAFpRAFPH[t]
  // RAFpRAFPH 0 RAFpRAFPH'[t] == a2*RAFp[t]*RAFPH[t] - d2*RAFpRAFPH[t] - k2*RAFpRAFPH[t]
  // RAFRAFK 0 RAFRAFK'[t] == a1*RAF[t]*RAFK[t] - d1*RAFRAFK[t] - k1*RAFRAFK[t]
  // Generated by Cellerator Version 1.0 update 2.1127 using Mathematica 4.2 for Mac OS X (June 4, 2002), November 27, 2002 12:16:35, using (PowerMac,PowerPC, Mac OS X,MacOSX,Darwin)
  // author=B.E.Shapiro

  // Compartments:
  compartment Cytoplasm;

  // Species:
  species MAPK in Cytoplasm = 0.3/Cytoplasm;
  species MAPKMAPKPH in Cytoplasm = 0;
  species MAPKp in Cytoplasm = 0;
  species MAPKPH in Cytoplasm = 0.3/Cytoplasm;
  species MAPKpMAPKPH in Cytoplasm = 0;
  species MAPKpMEKpp in Cytoplasm = 0;
  species MAPKpp in Cytoplasm = 0;
  species MAPKppMEKpp in Cytoplasm = 0;
  species MEK in Cytoplasm = 0.2/Cytoplasm;
  species MEKMEKPH in Cytoplasm = 0;
  species MEKp in Cytoplasm = 0;
  species MEKPH in Cytoplasm = 0.2/Cytoplasm;
  species MEKpMEKPH in Cytoplasm = 0;
  species MEKpp in Cytoplasm = 0;
  species MEKppRAFp in Cytoplasm = 0;
  species MEKpRAFp in Cytoplasm = 0;
  species RAF in Cytoplasm = 0.4/Cytoplasm;
  species RAFK in Cytoplasm = 0.1/Cytoplasm;
  species RAFp in Cytoplasm = 0;
  species RAFPH in Cytoplasm = 0.3/Cytoplasm;
  species RAFpRAFPH in Cytoplasm = 0;
  species RAFRAFK in Cytoplasm = 0;

  // Reactions:
  Reaction1: RAF + RAFK => RAFRAFK; a1*RAF*RAFK;
    a1 = 1;
  Reaction2: RAFRAFK => RAF + RAFK; d1*RAFRAFK;
    d1 = 0.4;
  Reaction3: RAFRAFK => RAFp; k1*RAFRAFK;
    k1 = 0.1;
  Reaction4: RAFp + RAFPH => RAFpRAFPH; a2*RAFp*RAFPH;
    a2 = 0.5;
  Reaction5: RAFpRAFPH => RAFp + RAFPH; d2*RAFpRAFPH;
    d2 = 0.5;
  Reaction6: RAFpRAFPH => RAF; k2*RAFpRAFPH;
    k2 = 0.1;
  Reaction7: MEK + MEKPH => MEKMEKPH; a3*MEK*MEKPH;
    a3 = 3.3;
  Reaction8: MEKMEKPH => MEK + MEKPH; d3*MEKMEKPH;
    d3 = 0.42;
  Reaction9: MEKMEKPH => MEKp; k3*MEKMEKPH;
    k3 = 0.1;
  Reaction10: MEKp + RAFp => MEKpRAFp; a4*MEKp*RAFp;
    a4 = 10;
  Reaction11: MEKpRAFp => MEKp + RAFp; d4*MEKpRAFp;
    d4 = 0.8;
  Reaction12: MEKpRAFp => MEK; k4*MEKpRAFp;
    k4 = 0.1;
  Reaction13: MEKp + MEKPH => MEKpMEKPH; a5*MEKp*MEKPH;
    a5 = 3.3;
  Reaction14: MEKpMEKPH => MEKp + MEKPH; d5*MEKpMEKPH;
    d5 = 0.4;
  Reaction15: MEKpMEKPH => MEKpp; k5*MEKpMEKPH;
    k5 = 0.1;
  Reaction16: MEKpp + RAFp => MEKppRAFp; a6*MEKpp*RAFp;
    a6 = 10;
  Reaction17: MEKppRAFp => MEKpp + RAFp; d6*MEKppRAFp;
    d6 = 0.8;
  Reaction18: MEKppRAFp => MEKp; k6*MEKppRAFp;
    k6 = 0.1;
  Reaction19: MAPK + MAPKPH => MAPKMAPKPH; a7*MAPK*MAPKPH;
    a7 = 20;
  Reaction20: MAPKMAPKPH => MAPK + MAPKPH; d7*MAPKMAPKPH;
    d7 = 0.6;
  Reaction21: MAPKMAPKPH => MAPKp; k7*MAPKMAPKPH;
    k7 = 0.1;
  Reaction22: MAPKp + MEKpp => MAPKpMEKpp; a8*MAPKp*MEKpp;
    a8 = 5;
  Reaction23: MAPKpMEKpp => MAPKp + MEKpp; d8*MAPKpMEKpp;
    d8 = 0.4;
  Reaction24: MAPKpMEKpp => MAPK; k8*MAPKpMEKpp;
    k8 = 0.1;
  Reaction25: MAPKp + MAPKPH => MAPKpMAPKPH; a9*MAPKp*MAPKPH;
    a9 = 20;
  Reaction26: MAPKpMAPKPH => MAPKp + MAPKPH; d9*MAPKpMAPKPH;
    d9 = 0.6;
  Reaction27: MAPKpMAPKPH => MAPKpp; k9*MAPKpMAPKPH;
    k9 = 0.1;
  Reaction28: MAPKpp + MEKpp => MAPKppMEKpp; a10*MAPKpp*MEKpp;
    a10 = 5;
  Reaction29: MAPKppMEKpp => MAPKpp + MEKpp; d10*MAPKppMEKpp;
    d10 = 0.4;
  Reaction30: MAPKppMEKpp => MAPKp; k10*MAPKppMEKpp;
    k10 = 0.1;
end
